units           real
neigh_modify    delay 0 every 1 check yes
atom_style      full
bond_style      harmonic
angle_style     harmonic
pair_style      lj/cut/coul/long 10.0
pair_modify     mix arithmetic
kspace_style    pppm 1e-4
special_bonds   amber

atom_modify	sort 0 0

read_data       data.water
restart         100 restart1.qmmmw restart2.qmmmw

timestep        1.0

dump            1 all xyz 1 dump.xyz

thermo_style    multi
thermo          1

fix             1 all ms2 master atoms.txt shmem qmmm

fix             2 all nvt temp 300.0 300.0 70.0

fix             3 all shake 0.0001 20 0 b 1 a 1

run             200
